# Пункт 1:
f(t) := exp(2*t)/(5*t)
t := 0.2
f(t) = 1.49182
t := -10 .. 10
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# Пункт 2:
m := 3
o := 1
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# Пункт 3:
m := 1.5
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m := 6
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# Пункт 4:
m := 3
o := 0.5
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o := 2
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# Пункт 5:
a := 2
t := 0 .. 100
b := 0.4
f(t) := b/a*(t/a)^(b - 1)*exp(-(t/a)^b)
F(t) := 1 - exp(-(t/a)^b)
5.2
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5.3
a := 1
f(t) := b/a*(t/a)^(b - 1)*exp(-(t/a)^b)
F(t) := 1 - exp(-(t/a)^b)
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a := 4
f(t) := b/a*(t/a)^(b - 1)*exp(-(t/a)^b)
F(t) := 1 - exp(-(t/a)^b)
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5.4
a := 2
b := 0.2
f(t) := b/a*(t/a)^(b - 1)*exp(-(t/a)^b)
F(t) := 1 - exp(-(t/a)^b)
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b := 0.8
f(t) := b/a*(t/a)^(b - 1)*exp(-(t/a)^b)
F(t) := 1 - exp(-(t/a)^b)
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